# OpenSim document version 40000
InverseKinematicsTool:
  results_directory: ./
  model_file: Model_Pose2Sim_Body25b_FLESH_15_05_scaled.osim
  constraint_weight: Inf
  accuracy: 1e-5
  time_range: 0.0166667 4.966667
  output_motion_file: IK_trial_FLESH_test.mot
  report_errors: true
  marker_file: projectdata\Session_s1\P1\T1\pose-3d\T1_0-298_filt_butterworth_LSTM.trc
  report_marker_locations: false
  IKTaskSet:
    IKMarkerTask Nose: apply=true weight=0.1
    IKMarkerTask Head: apply=true weight=0.1
    IKMarkerTask Neck: apply=true weight=0.2
    IKMarkerTask LShoulder: apply=true weight=2
    IKMarkerTask RShoulder: apply=true weight=2
    IKMarkerTask LElbow: apply=true weight=1
    IKMarkerTask RElbow: apply=true weight=1
    IKMarkerTask LWrist: apply=true weight=1
    IKMarkerTask RWrist: apply=true weight=1
    IKMarkerTask LHip: apply=true weight=2
    IKMarkerTask RHip: apply=true weight=2
    IKMarkerTask LKnee: apply=true weight=1
    IKMarkerTask RKnee: apply=true weight=1
    IKMarkerTask LAnkle: apply=true weight=1
    IKMarkerTask RAnkle: apply=true weight=1
    IKMarkerTask LBigToe: apply=true weight=1
    IKMarkerTask LSmallToe: apply=true weight=1
    IKMarkerTask LHeel: apply=true weight=1
    IKMarkerTask RBigToe: apply=true weight=1
    IKMarkerTask RSmallToe: apply=true weight=1
    IKMarkerTask RHeel: apply=true weight=1
    IKCoordinateTask L5_S1_Flex_Ext: apply=false weight=1 value_type=default_value value=0
