# OpenSim document version 40000
ScaleTool Pose2Sim_scaled:
  mass: 64 [kg]
  height: -1
  age: -1
  GenericModelMaker:
    model_file: Pose2Sim/OpenSim_Setup/Model_Pose2Sim_Body25b.osim
  ModelScaler:
    apply: true
    scaling_order: measurements manualScale
    marker_file: projectdata\Session_s1\P1\T2\pose-3d\T2_0-236_filt_butterworth_LSTM.trc
    time_range: 0 3
    preserve_mass_distribution: true
    MeasurementSet:
      Measurement torso: apply=true
        MarkerPair: markers=(LShoulder LHip)
        MarkerPair: markers=(RShoulder RHip)
        BodyScale lumbar5: axes=(X Y Z)
        BodyScale lumbar4: axes=(X Y Z)
        BodyScale lumbar3: axes=(X Y Z)
        BodyScale lumbar2: axes=(X Y Z)
        BodyScale lumbar1: axes=(X Y Z)
        BodyScale torso: axes=(X Y Z)
      Measurement arm: apply=true
        MarkerPair: markers=(LShoulder LElbow)
        MarkerPair: markers=(RShoulder RElbow)
        BodyScale humerus_r: axes=(X Y Z)
        BodyScale humerus_l: axes=(X Y Z)
      Measurement forearm: apply=true
        MarkerPair: markers=(LElbow LWrist)
        MarkerPair: markers=(RElbow RWrist)
        BodyScale ulna_r: axes=(X Y Z)
        BodyScale radius_r: axes=(X Y Z)
        BodyScale hand_r: axes=(X Y Z)
        BodyScale ulna_l: axes=(X Y Z)
        BodyScale radius_l: axes=(X Y Z)
        BodyScale hand_l: axes=(X Y Z)
      Measurement thigh: apply=true
        MarkerPair: markers=(LHip LKnee)
        MarkerPair: markers=(RHip RKnee)
        BodyScale femur_r: axes=(X Y Z)
        BodyScale patella_r: axes=(X Y Z)
        BodyScale femur_l: axes=(X Y Z)
        BodyScale patella_l: axes=(X Y Z)
      Measurement shank: apply=true
        MarkerPair: markers=(LKnee LAnkle)
        MarkerPair: markers=(RKnee RAnkle)
        BodyScale tibia_r: axes=(X Y Z)
        BodyScale tibia_l: axes=(X Y Z)
      Measurement foot: apply=true
        MarkerPair: markers=(LHeel LBigToe)
        MarkerPair: markers=(RHeel RBigToe)
        BodyScale talus_r: axes=(X Y Z)
        BodyScale calcn_r: axes=(X Y Z)
        BodyScale toes_r: axes=(X Y Z)
        BodyScale talus_l: axes=(X Y Z)
        BodyScale calcn_l: axes=(X Y Z)
        BodyScale toes_l: axes=(X Y Z)
      Measurement head: apply=true
        MarkerPair: markers=(Head Nose)
        MarkerPair: markers=(Head Neck)
        BodyScale head: axes=(X Y Z)
      Measurement pelvis: apply=true
        MarkerPair: markers=(RHip LHip)
        BodyScale pelvis: axes=(X Y Z)
        BodyScale sacrum: axes=(X Y Z)
  MarkerPlacer:
    apply: true
    marker_file: projectdata/Session_s1/P1/T2/pose-3d/T2_0-236_filt_butterworth_LSTM.trc
    time_range: 0 3
    output_model_file: Model_Pose2Sim_Body25b_FLESH_15_05_scaled.osim
    max_marker_movement: -1
    IKTaskSet:
      IKMarkerTask Nose: apply=true weight=0.1
      IKMarkerTask Head: apply=true weight=0.1
      IKMarkerTask Neck: apply=true weight=1
      IKMarkerTask LShoulder: apply=true weight=2
      IKMarkerTask RShoulder: apply=true weight=2
      IKMarkerTask LElbow: apply=true weight=1
      IKMarkerTask RElbow: apply=true weight=1
      IKMarkerTask LWrist: apply=true weight=1
      IKMarkerTask RWrist: apply=true weight=1
      IKMarkerTask LHip: apply=true weight=2
      IKMarkerTask RHip: apply=true weight=2
      IKMarkerTask LKnee: apply=true weight=1
      IKMarkerTask RKnee: apply=true weight=1
      IKMarkerTask LAnkle: apply=true weight=1
      IKMarkerTask RAnkle: apply=true weight=1
      IKMarkerTask LBigToe: apply=true weight=1
      IKMarkerTask LSmallToe: apply=true weight=1
      IKMarkerTask LHeel: apply=true weight=1
      IKMarkerTask RBigToe: apply=true weight=1
      IKMarkerTask RSmallToe: apply=true weight=1
      IKMarkerTask RHeel: apply=true weight=1
      IKCoordinateTask [values shared by the 5 below unless stated]: apply=false weight=1 value_type=default_value
          value=0
      IKCoordinateTask pelvis_tilt
      IKCoordinateTask pelvis_list
      IKCoordinateTask ankle_angle_r
      IKCoordinateTask ankle_angle_l
      IKCoordinateTask L5_S1_Flex_Ext
